// SBML level 2 version 4

model SMA_liver()

  // Compartments:
  compartment default = 1 volume;
  compartment plasma in default = 1 volume;
  compartment hepatocyte in default = 1 volume;
  compartment mitochondria in hepatocyte = 1 volume;
  compartment pancreas in default = 1 volume;
  compartment beta_cell in pancreas = 1 volume;
  compartment alpha_cell in pancreas = 1 volume;

  // Species:
  species glycogen in hepatocyte = 0;
  species acetyl_coA in mitochondria = 0; acetyl_coA is "acetyl-coA";
  species HS_coA in mitochondria = 0; HS_coA is "HS-coA";
  species pyruvate in mitochondria = 0;
  species s59 in hepatocyte = 0; s59 is "AMPK";
  species s61 in hepatocyte = 0; s61 is "AMPK";
  species CRY_hepatocyte in hepatocyte = 0;
  species s65 in hepatocyte = 0; s65 is "Cry1";
  species s66 in hepatocyte = 0; s66 is "Cry1";
  species s68 in hepatocyte = 0;
  species Fatty_acids in plasma = 0;
  species aminoacids in plasma = 0;
  species ATP_hepatocyte in hepatocyte = 0;
  species ADP_hepatocyte in hepatocyte = 0;
  species ATP_mitochondria in mitochondria = 0;
  species ADP_mitochondria in mitochondria = 0;
  species glucose_plasma in plasma = 0;
  species insulin_plasma in plasma = 0;
  species glucagon_plasma in plasma = 0;
  species s105 in alpha_cell = 0; s105 is "Cry1";
  species s106 in alpha_cell = 0; s106 is "Cry1";
  species CRY_beta_cell in beta_cell = 0;
  species s68_beta_cell in beta_cell = 0;
  species s132 in beta_cell = 0; s132 is "Cry1";
  species s133 in beta_cell = 0; s133 is "Cry1";
  species CRY_alpha_cell in alpha_cell = 0;
  species s68_alpha_cell in alpha_cell = 0;
  species insulin_beta_cell in beta_cell = 0;
  species glucose_beta_cell in beta_cell = 0;
  species glucagon_alpha_cell in alpha_cell = 0;
  species glucose_alpha_cell in alpha_cell = 0;
  species glucose_p in hepatocyte = 0;

  // Reactions:
  re19: pyruvate + ATP_hepatocyte => glucose_p + ADP_hepatocyte; ;  // modifiers: s61, glucagon_plasma
  re24: glucose_p + ADP_hepatocyte => pyruvate + ATP_hepatocyte; s41;  // modifiers: acetyl_coA, s61
  re36: glycogen => glucose_p; ;  // modifiers: glucagon_plasma
  re47: s59 => s61; ;  // modifiers: ADP_mitochondria
  re49: s65 => s66; ;  // modifiers: CRY_hepatocyte
  re50: s66 => CRY_hepatocyte; ;
  re53: CRY_hepatocyte => s68; ;
  re54: glucose_p => glucose_plasma; ;
  re56: aminoacids => pyruvate; ;
  re57: s61 => s59; ;  // modifiers: ATP_mitochondria
  re63: pyruvate + HS_coA => acetyl_coA; ;
  re64: acetyl_coA + ADP_mitochondria => HS_coA + ATP_mitochondria; ;  // modifiers: CRY_hepatocyte
  re69: glucose_plasma + ATP_hepatocyte => glucose_p + ADP_hepatocyte; ;
  re70: glucose_p + ATP_hepatocyte => glycogen + ADP_hepatocyte; ;  // modifiers: s61, insulin_plasma
  re73: s106 => s105; ;  // modifiers: CRY_alpha_cell
  re74: s105 => CRY_alpha_cell; ;
  re75: CRY_alpha_cell => s68_alpha_cell; ;
  re111: glucose_plasma => glucose_beta_cell; ;
  re113: glucose_plasma => glucose_alpha_cell; ;
  re115: insulin_beta_cell => insulin_plasma; ;  // modifiers: CRY_beta_cell, glucose_beta_cell
  re116: glucagon_alpha_cell => glucagon_plasma; ;  // modifiers: CRY_alpha_cell, glucose_alpha_cell
  re117: acetyl_coA => Fatty_acids; ;
  re121: s132 => s133; ;  // modifiers: CRY_beta_cell
  re122: s133 => CRY_beta_cell; ;
  re123: CRY_beta_cell => s68_beta_cell; ;
  re124: glucose_beta_cell => s68_beta_cell; ;
  re125: glucose_alpha_cell => s68_alpha_cell; ;
  re126: Fatty_acids + HS_coA => acetyl_coA; ;

  // Unit definitions:
  unit substance = mole;
  unit volume = litre;
  unit area = metre^2;
  unit length = metre;
  unit time = second;
end
