// SBML level 2 version 4

model SMA_liver()

  // Compartments:
  compartment default = 1 volume;
  compartment plasma in default = 1 volume;
  compartment hepatocyte in default = 1 volume;
  compartment mitochondria in hepatocyte = 1 volume;

  // Species:
  species glycogen in hepatocyte = 0;
  species acetyl_coA in mitochondria = 0; acetyl_coA is "acetyl-coA";
  species HS_coA in mitochondria = 0; HS_coA is "HS-coA";
  species NAD in mitochondria = 0; NAD is "NAD+";
  species TAG in hepatocyte = 0;
  species Fatty_acids_hepatocyte in hepatocyte = 0;
  species pyruvate_mitochondria in mitochondria = 0;
  species ATP_mitochondria in mitochondria = 0;
  species ADP_mitochondria in mitochondria = 0;
  species glucose_plasma in plasma = 0;
  species Fatty_acids_plasma in plasma = 0;
  species aminoacids_hepatocyte in hepatocyte = 0;
  species aminoacids_plasma in plasma = 0;
  species ADP_hepatocyte in hepatocyte = 0;
  species ATP_hepatocyte in hepatocyte = 0;
  species pyruvate_hepatocyte in hepatocyte = 0;
  species glucose_hepatocyte in hepatocyte = 0;
  species aminoacids_mitochondria in mitochondria = 0;
  species citrate in hepatocyte = 0;
  species alanine in hepatocyte = 0;
  species CO2 in mitochondria = 0;
  species NADH in mitochondria = 0;
  species SREBP_1c in hepatocyte = 0; SREBP_1c is "SREBP-1c";
  species ChREBP in hepatocyte = 0;
  species glucagon in hepatocyte = 0;
  species pin_phrine in hepatocyte = 0; pin_phrine is "épinéphrine";
  species insulin in hepatocyte = 0;
  species SHP in hepatocyte = 0;
  species DAX_1 in hepatocyte = 0; DAX_1 is "DAX-1";
  species SMILE in hepatocyte = 0;

  // Reactions:
  re1: glucose_plasma => glucose_hepatocyte; ;
  re7: glucose_hepatocyte => glucose_plasma; ;
  re9: pyruvate_hepatocyte => pyruvate_mitochondria; ;
  re15: pyruvate_mitochondria + NAD + HS_coA => acetyl_coA + CO2 + NADH; ;
  re19: pyruvate_hepatocyte + ATP_hepatocyte => glucose_hepatocyte + ADP_hepatocyte; ;  // modifiers: glucagon, pin_phrine, SHP, DAX_1, SMILE
  re22: aminoacids_plasma => aminoacids_hepatocyte; ;
  re24: glucose_hepatocyte => pyruvate_hepatocyte; Fatty_acids_hepatocyte;  // modifiers: acetyl_coA, Fatty_acids_hepatocyte, ATP_mitochondria, citrate, alanine, SREBP_1c, ChREBP, ADP_hepatocyte
  re25: aminoacids_hepatocyte => aminoacids_mitochondria; ;
  re26: aminoacids_mitochondria => pyruvate_mitochondria; ;
  re27: pyruvate_mitochondria => pyruvate_hepatocyte; ;
  re30: acetyl_coA => TAG; ;  // modifiers: SREBP_1c, ChREBP
  re31: TAG => Fatty_acids_hepatocyte; ;
  re32: Fatty_acids_plasma => Fatty_acids_hepatocyte; ;
  re33: Fatty_acids_hepatocyte => acetyl_coA; ;
  Glycogenogenesis: glucose_hepatocyte => glycogen; ;  // modifiers: insulin
  re36: glycogen => glucose_hepatocyte; ;  // modifiers: glucagon, pin_phrine
  re41: acetyl_coA + ADP_mitochondria => HS_coA + ATP_mitochondria; ;
  re42: insulin => glucose_hepatocyte; ;
  re43: glucose_hepatocyte => insulin; ;
  re44: insulin => SREBP_1c; ;
  re45: glucose_hepatocyte => ChREBP; ;

  // Unit definitions:
  unit substance = mole;
  unit volume = litre;
  unit area = metre^2;
  unit length = metre;
  unit time = second;
end
