// SBML level 2 version 4

model SMA_liver()

  // Compartments:
  compartment default = 1 volume;
  compartment plasma in default = 1 volume;
  compartment hepatocyte in default = 1 volume;
  compartment mitochondria in hepatocyte = 1 volume;

  // Species:
  species glycogen in hepatocyte = 0;
  species acetyl_coA in mitochondria = 0; acetyl_coA is "acetyl-coA";
  species HS_coA in mitochondria = 0; HS_coA is "HS-coA";
  species NAD in mitochondria = 0; NAD is "NAD+";
  species Fatty_acids_hepatocyte in hepatocyte = 0;
  species ATP_mitochondria in mitochondria = 0;
  species ADP_mitochondria in mitochondria = 0;
  species glucose_plasma in plasma = 0;
  species Fatty_acids_plasma in plasma = 0;
  species aminoacids_hepatocyte in hepatocyte = 0;
  species aminoacids_plasma in plasma = 0;
  species ADP_hepatocyte in hepatocyte = 0;
  species ATP_hepatocyte in hepatocyte = 0;
  species pyruvate_hepatocyte in hepatocyte = 0;
  species glucose_hepatocyte in hepatocyte = 0;
  species aminoacids_mitochondria in mitochondria = 0;
  species CO2 in mitochondria = 0;
  species NADH in mitochondria = 0;
  species ChREBP in hepatocyte = 0;
  species s59 in hepatocyte = 0; s59 is "AMPK";
  species s61 in hepatocyte = 0; s61 is "AMPK";
  species insulin in plasma = 0;
  species Glucagon in plasma = 0;
  species s62 in hepatocyte = 0; s62 is "CRY";
  species s63 in hepatocyte = 0; s63 is "CRY";
  species s65 in hepatocyte = 0; s65 is "Cry1";
  species s66 in hepatocyte = 0; s66 is "Cry1";
  species pyruvate_mitochondria in mitochondria = 0;

  // Reactions:
  re1: glucose_plasma => glucose_hepatocyte; ;
  re7: glucose_hepatocyte => glucose_plasma; ;
  re9: pyruvate_hepatocyte => pyruvate_mitochondria; ;
  re15: pyruvate_mitochondria + NAD + HS_coA => acetyl_coA + CO2 + NADH; ;
  re19: pyruvate_hepatocyte + ATP_hepatocyte => glucose_hepatocyte + ADP_hepatocyte; ;  // modifiers: Glucagon, s61
  re22: aminoacids_plasma => aminoacids_hepatocyte; ;
  re24: glucose_hepatocyte => pyruvate_hepatocyte; Fatty_acids_hepatocyte;  // modifiers: acetyl_coA, Fatty_acids_hepatocyte, ChREBP, s61
  re25: aminoacids_hepatocyte => aminoacids_mitochondria; ;
  re26: aminoacids_mitochondria => pyruvate_mitochondria; ;
  re27: pyruvate_mitochondria => pyruvate_hepatocyte; ;
  re30: acetyl_coA => Fatty_acids_hepatocyte; ;  // modifiers: ChREBP, insulin, s61
  re32: Fatty_acids_plasma => Fatty_acids_hepatocyte; ;
  re33: Fatty_acids_hepatocyte => acetyl_coA; ;  // modifiers: s61
  Glycogenogenesis: glucose_hepatocyte => glycogen; ;  // modifiers: insulin, s61
  re36: glycogen => glucose_hepatocyte; ;  // modifiers: Glucagon
  re41: acetyl_coA + ADP_mitochondria => HS_coA + ATP_mitochondria; ;  // modifiers: s63
  re45: glucose_hepatocyte => ChREBP; ;
  re47: s59 => s61; ;  // modifiers: ADP_hepatocyte, ATP_hepatocyte, ATP_mitochondria, ADP_mitochondria
  re48: s62 => s63; ;  // modifiers: s61
  re49: s65 => s66; ;  // modifiers: s63
  re50: s66 => s63; ;

  // Unit definitions:
  unit substance = mole;
  unit volume = litre;
  unit area = metre^2;
  unit length = metre;
  unit time = second;
end
