// SBML level 2 version 4

model SMA_liver()

  // Compartments:
  compartment default = 1 volume;
  compartment plasma in default = 1 volume;
  compartment hepatocyte in default = 1 volume;
  compartment mitochondria in hepatocyte = 1 volume;

  // Species:
  species glycogen in hepatocyte = 0;
  species acetyl_coA in mitochondria = 0; acetyl_coA is "acetyl-coA";
  species HS_coA in mitochondria = 0; HS_coA is "HS-coA";
  species pyruvate in mitochondria = 0;
  species glucose_hepatocyte in hepatocyte = 0;
  species s59 in hepatocyte = 0; s59 is "AMPK";
  species s61 in hepatocyte = 0; s61 is "AMPK";
  species CRY in hepatocyte = 0;
  species s65 in hepatocyte = 0; s65 is "Cry1";
  species s66 in hepatocyte = 0; s66 is "Cry1";
  species s68 in hepatocyte = 0;
  species Fatty_acids in plasma = 0;
  species aminoacids in plasma = 0;
  species ATP_hepatocyte in hepatocyte = 0;
  species ADP_hepatocyte in hepatocyte = 0;
  species glucose_plasma in plasma = 0;
  species ATP_mitochondria in mitochondria = 0;
  species ADP_mitochondria in mitochondria = 0;

  // Reactions:
  re19: pyruvate => glucose_hepatocyte; ;  // modifiers: s61
  re24: glucose_hepatocyte => pyruvate; s41;  // modifiers: acetyl_coA, s61
  Glycogenogenesis: glucose_hepatocyte => glycogen; ;  // modifiers: s61
  re36: glycogen => glucose_hepatocyte; ;
  re47: s59 => s61; ;  // modifiers: ADP_mitochondria
  re49: s65 => s66; ;  // modifiers: CRY
  re50: s66 => CRY; ;
  re53: CRY => s68; ;  // modifiers: s59
  re54: glucose_hepatocyte => glucose_plasma; ;
  beta_oxydation: Fatty_acids => acetyl_coA; ; beta_oxydation is "beta-oxydation";
  re56: aminoacids => pyruvate; ;
  re57: s61 => s59; ;  // modifiers: ATP_mitochondria
  re61: glucose_plasma + ATP_hepatocyte => glucose_hepatocyte + ADP_hepatocyte; ;
  re62: acetyl_coA + ADP_mitochondria => HS_coA + ATP_mitochondria; ;
  re63: pyruvate + HS_coA => acetyl_coA; ;
  re64: acetyl_coA => HS_coA; ;  // modifiers: CRY
  re65: glucose_hepatocyte + ADP_hepatocyte => pyruvate + ATP_hepatocyte; ;
  re67: glucose_hepatocyte + ATP_hepatocyte => glycogen + ADP_hepatocyte; ;
  re68: pyruvate + ATP_hepatocyte => glucose_hepatocyte + ADP_hepatocyte; ;

  // Unit definitions:
  unit substance = mole;
  unit volume = litre;
  unit area = metre^2;
  unit length = metre;
  unit time = second;
end
