// SBML level 2 version 4

model SMA_liver()

  // Compartments:
  compartment default = 1 volume;
  compartment plasma in default = 1 volume;
  compartment hepatocyte in default = 1 volume;
  compartment mitochondria in hepatocyte = 1 volume;
  compartment pancreas in default = 1 volume;

  // Species:
  species glycogen in hepatocyte = 0;
  species acetyl_coA in mitochondria = 0; acetyl_coA is "acetyl-coA";
  species HS_coA in mitochondria = 0; HS_coA is "HS-coA";
  species pyruvate in mitochondria = 0;
  species glucose_hepatocyte in hepatocyte = 0;
  species s59 in hepatocyte = 0; s59 is "AMPK";
  species s61 in hepatocyte = 0; s61 is "AMPK";
  species CRY_hepatocyte in hepatocyte = 0;
  species s65 in hepatocyte = 0; s65 is "Cry1";
  species s66 in hepatocyte = 0; s66 is "Cry1";
  species s68 in hepatocyte = 0;
  species Fatty_acids in plasma = 0;
  species aminoacids in plasma = 0;
  species ATP_hepatocyte in hepatocyte = 0;
  species ADP_hepatocyte in hepatocyte = 0;
  species ATP_mitochondria in mitochondria = 0;
  species ADP_mitochondria in mitochondria = 0;
  species glucose_plasma in plasma = 0;
  species insulin in plasma = 0;
  species glucagon in plasma = 0;
  species beta_cell in pancreas = 0;
  species alpha_cell in pancreas = 0;
  species delta_cell in pancreas = 0;
  species Arx in pancreas = 0;
  species s105 in pancreas = 0; s105 is "Cry1";
  species s106 in pancreas = 0; s106 is "Cry1";
  species CRY_pancreas in pancreas = 0;
  species s108 in pancreas = 0; s108 is "s68";
  species Pdx1 in pancreas = 0;
  species Hhex in pancreas = 0;

  // Reactions:
  re19: pyruvate + ATP_hepatocyte => glucose_hepatocyte + ADP_hepatocyte; ;  // modifiers: s61, glucagon
  re24: glucose_hepatocyte + ADP_hepatocyte => pyruvate + ATP_hepatocyte; s41;  // modifiers: acetyl_coA, s61
  re36: glycogen => glucose_hepatocyte; ;  // modifiers: glucagon
  re47: s59 => s61; ;  // modifiers: ADP_mitochondria
  re49: s65 => s66; ;  // modifiers: CRY_hepatocyte
  re50: s66 => CRY_hepatocyte; ;
  re53: CRY_hepatocyte => s68; ;  // modifiers: s59
  re54: glucose_hepatocyte => glucose_plasma; ;
  beta_oxydation: Fatty_acids => acetyl_coA; ; beta_oxydation is "beta-oxydation";
  re56: aminoacids => pyruvate; ;
  re57: s61 => s59; ;  // modifiers: ATP_mitochondria
  re63: pyruvate + HS_coA => acetyl_coA; ;
  re64: acetyl_coA + ADP_mitochondria => HS_coA + ATP_mitochondria; ;  // modifiers: CRY_hepatocyte
  re69: glucose_plasma + ATP_hepatocyte => glucose_hepatocyte + ADP_hepatocyte; ;
  re70: glucose_hepatocyte + ATP_hepatocyte => glycogen + ADP_hepatocyte; ;  // modifiers: s61, insulin
  re71: beta_cell => insulin; ;  // modifiers: delta_cell
  re72: alpha_cell => glucagon; ;  // modifiers: delta_cell
  re73: s106 => s105; ;  // modifiers: CRY_pancreas
  re74: s105 => CRY_pancreas; ;
  re75: CRY_pancreas => s108; ;
  re76: Pdx1 => beta_cell; ;  // modifiers: CRY_pancreas
  re77: Arx => alpha_cell; ;  // modifiers: CRY_pancreas
  re78: Hhex => delta_cell; ;  // modifiers: CRY_pancreas

  // Unit definitions:
  unit substance = mole;
  unit volume = litre;
  unit area = metre^2;
  unit length = metre;
  unit time = second;
end
